// SBML level 3 version 2
// dcterms:bibliographicCitation: urn:miriam:pubmed:32706790

function Rate_Law_for_reaction(beta, S, I, N, epsilon)
  (1 - epsilon)*beta*S*I/N;
end

model Mukandavire2020___SEIR_model_of_early_COVID_19_transmission_in_South_Africa()
  // Mukandavire2020 - SEIR model of early COVID-19 transmission in South Africa
  // The emergence and fast global spread of COVID-19 has presented one of the greatest public health challenges in modern times with no proven cure or vaccine. Africa is still early in this epidemic, therefore the extent of disease severity is not yet clear. We used a mathematical model to fit to the observed cases of COVID-19 in South Africa to estimate the basic reproductive number and critical vaccination coverage to control the disease for different hypothetical vaccine efficacy scenarios. We also estimated the percentage reduction in effective contacts due to the social distancing measures implemented. Early model estimates show that COVID-19 outbreak in South Africa had a basic reproductive number of 2.95 (95% credible interval [CrI] 2.83–3.33). A vaccine with 70% efficacy had the capacity to contain COVID-19 outbreak but at very higher vaccination coverage 94.44% (95% Crl 92.44–99.92%) with a vaccine of 100% efficacy requiring 66.10% (95% Crl 64.72–69.95%) coverage. Social distancing measures put in place have so far reduced the number of social contacts by 80.31% (95% Crl 79.76–80.85%). These findings suggest that a highly efficacious vaccine would have been required to contain COVID-19 in South Africa. Therefore, the current social distancing measures to reduce contacts will remain key in controlling the infection in the absence of vaccines and other therapeutics.
  // isDescribedBy pubmed:32706790
  // DOID:0080600
  // hasTaxon taxonomy:2697049 taxonomy:9606
  // hasProperty mamo:MAMO_0000028
  // biomodels.db:MODEL2012010001 biomodels.db:BIOMD0000000978
  // model units - substance: substance, time: time, volume: volume, area: area, length: length, extent: substance

  // Compartments:
  compartment South_Africa = 1 volume;  // ncit:C17151

  // Species:
  species Susceptible in South_Africa = N;  // ido:0000514
  species Exposed in South_Africa = 0;  // ido:0000514; ncit:C171133; ido:0000597
  species Infected in South_Africa = 2;  // ido:0000511; ncit:C171133
  species Recovered in South_Africa = 0;  // hasProperty ido:0000621

  // Parameters:
  beta = 1.3;
  epsilon = 0;
  sigma = 0.311;
  gamma = 0.3389831;
  N = 36196938;
  Event_trigger = 1;

  // Assignment rules:
  Cumulative_cases := Infected + Recovered;

  // Reactions:
  Susceptible_to_Exposed: Susceptible => Exposed; South_Africa*Rate_Law_for_reaction(beta, Susceptible, Infected, N, epsilon);  // modifiers: Infected; ido:0000597
  Exposed_to_Infected: Exposed => Infected; South_Africa*sigma*Exposed;  // ncit:C128320; ncit:C171133
  Infected_to_Recovered: Infected => Recovered; South_Africa*gamma*Infected;  // ncit:C25746

  // Events:
  Lockdown: at (time > 23), persistent=false, fromTrigger=false: epsilon = Event_trigger*0.8031;

  // Unit definitions:
  unit length = metre;
  unit area = metre^2;
  unit volume = 1e-3 litre;
  unit time = 86400 second;
  unit substance = item;
end
